# Large system: run with KOKKOS multithreading (Atomify detects this line)
suffix kk

# Tell Atomify where initial camera position should be
#/camera position 298.1 223.0 397.3
#/camera target 176.7 189.5 147.0
# Information about atoms for coloring and bonds
#/atom 1 silicon
#/atom 2 oxygen
#/bond 1 2 2.6

units metal
boundary p p p
atom_style atomic
read_data nanoporous_sio2.data

replicate 2 2 2

pair_style zero 5.5
pair_coeff * *

mass 1 28.08
mass 2 15.9994

thermo_style one
thermo 100

timestep 0.002
compute rdf all rdf 200 1 1 2 2 1 2
fix nvt all nvt temp 500 500 0.2
print "Close the console and fly around in the material using WASD + arrow keys"
