#/camera position 3.0 1.5 60.1
#/camera target 4.1 -0.7 -2.6
#/atom 1 1.0 #a1a1a1
#/atom 2 3.0 #6EBFC0

# This LAMMPS input script simulates LJ particles with reflecting walls in 2D
# Demonstrates wall rendering in 2D mode

# main parameters
units lj
dimension 2
atom_style atomic
pair_style lj/cut 2.5
boundary f f p  # Fixed X and Y (for walls), periodic Z (required for 2D)

# create system and insert atoms
region myreg block -30 30 -30 30 -0.5 0.5
create_box 2 myreg
create_atoms 1 random 1500 341341 myreg
create_atoms 2 random 100 127569 myreg

# atom settings
mass 1 1
mass 2 1
pair_coeff 1 1 1.0 1.0
pair_coeff 2 2 0.5 3.0
neigh_modify every 1 delay 5 check yes

# Add walls before minimization to prevent atoms from escaping
fix mywalls all wall/lj93 xlo EDGE 1.0 1.0 2.5 xhi EDGE 1.0 1.0 2.5 ylo EDGE 1.0 1.0 2.5 yhi EDGE 1.0 1.0 2.5

# minimisation
minimize 1.0e-4 1.0e-6 1000 10000

# dynamics
fix mynve all nve
fix mylgv all langevin 1.0 1.0 0.1 1530917
fix myefn all enforce2d
timestep 0.005

# outputs
thermo 10
thermo_style one

# run
run 1000
